# Difficulty implementation
ref(d, p) := d^2/(1 + p)*1000
# [plot: ref(1, p), ref(2, p), ref(3, p), ref(4, p), ref(5, p), ref(6, p), ref(7, p), ref(8, p), ref(9, p), ref(10, p), 10000, 7500, 5000, 2500 vs p]
diceroll := 0 .. 50000
# For every new best play found, roll dice. If diceroll < ref(d, p), keep it.
